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/batch
! ANSYS input file written by Workbench version 19.0 RELEASE
! File used for geometry attach: D:\git-reprository\copyfile\有限元\test\3.9_files\dp0\SYS-3\DM\SYS-3.agdb
/title,3.9--Static Structural (D5)
/com,--- Data in consistent MKS units. See Solving Units in the help system for more information.
/units,MKS
/prep7
! Turn off shape checking because checks already performed inside WB mesher.
! See help system for more information.
SHPP,OFF,,NOWARN
etcon,set             ! allow ANSYS to choose best KEYOP's for 180x elements
/com,*********** Nodes for the whole assembly ***********
nblock,3,,8806
(1i9,3e20.9e3)
        1   -2.263840174E-003    1.468348495E-003    1.999999955E-002
        2   -2.604242238E-003    3.335334612E-003    1.999999955E-002
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-1
/com,*********** Elements for Body 1 "head" ***********
et,1,186
keyo,1,2,1          ! set full integration on SOLID186
eblock,19,solid,,963
(19i9)
        1        1        1        1        0        0        0        0       20        0        1      726      752     1959     1956      632      658     2043     2040
     4240     7782     7547     7755     2212     8006     7799     7979     4159     4237     7791     7785
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-1
/com,*********** Elements for Body 2 "rear" ***********
et,2,186
keyo,2,2,1          ! set full integration on SOLID186
eblock,19,solid,,711
(19i9)
        2        2        1        2        0        0        0        0       20        0      253     1760     1786     1710     1708      134      187       32       30
     7044     7043     6813     6964     2233     2670     2314     2563     7112     7138     7061     7060
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-1
/com,*********** Send User Defined Coordinate System(s) ***********
csys,0
toffst,273.15,  ! Temperature offset from absolute zero
/com,*********** Set Reference Temperature ***********
tref,22.
/com,*********** Send Materials ***********
Temperature = 'TEMP' ! Temperature
MP,DENS,1,7850,	! kg m^-3
MP,ALPX,1,1.2e-05,	! C^-1
MP,C,1,434,	! J kg^-1 C^-1
MP,KXX,1,60.5,	! W m^-1 C^-1
MP,RSVX,1,1.7e-07,	! kg m^3 A^-2 s^-3
MP,EX,1,200000000000,	! Pa
MP,NUXY,1,0.3,
MP,MURX,1,10000,

MP,DENS,2,7850,	! kg m^-3
MP,EX,2,210000000000,	! Pa
MP,NUXY,2,0.3,

!************************* Model Summary ********************
!head,	Structural Steel,	matid,	1
!rear,	new material,	matid,	2
!************************* End Model Summary ********************
/com,*********** Fixed Supports ***********
CMBLOCK,_FIXEDSU,NODE,      812
(8i10)
       133       134       137       139       141       143       145       147
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cmsel,s,_FIXEDSU
d,all,all
nsel,all
/com,*********** Define Force Using Surface Effect Elements ***********
local,12,0,0.,0.,0.,-0.,0.,0.
csys,0
et,3,154
eblock,10,,,84
(15i9)
     1675        3        3        3       12     2097     2013     2011     2095     7927     7677     7923     2143
     1676        3        3        3       12     2098     2014     2013     2097     7929     7680     7927     2142
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-1
esel,s,type,,3
keyop,3,2,1                ! Apply load in local coordinate system
keyop,3,7,1                ! Use original area so load is constant in large deformation
keyop,3,11,2               ! Use real and not project area
esel,all

*DIM,_loadvari33x,TABLE,2,1,1,TIME,
! Time values
_loadvari33x(1,0,1) = 0.
_loadvari33x(2,0,1) = 1.
! Load values
_loadvari33x(1,1,1) = 0.
_loadvari33x(2,1,1) = 0.


*DIM,_loadvari33y,TABLE,2,1,1,TIME,
! Time values
_loadvari33y(1,0,1) = 0.
_loadvari33y(2,0,1) = 1.
! Load values
_loadvari33y(1,1,1) = 0.
_loadvari33y(2,1,1) = 132629.468549386


*DIM,_loadvari33z,TABLE,2,1,1,TIME,
! Time values
_loadvari33z(1,0,1) = 0.
_loadvari33z(2,0,1) = 1.
! Load values
_loadvari33z(1,1,1) = 0.
_loadvari33z(2,1,1) = 0.

fini
/com,****************************************************************************
/com,*************************    SOLUTION       ********************************
/com,****************************************************************************
/solu
antype,0                   ! static analysis
eqsl,pcg,1e-8,,,,,,1
cntr,print,1               ! print out contact info and also make no initial contact an error
dmpoption,emat,no             ! Don't combine emat file for DANSYS
dmpoption,esav,no             ! Don't combine esav file for DANSYS
nldiag,cont,iter           ! print out contact info each equilibrium iteration
rescontrol,,none                 ! Do not keep any restart files
/com,****************************************************
/com,******************* SOLVE FOR LS 1 OF 1 ****************
esel,s,type,,3
nsle
sfe,all,1,pres,1,%_loadvari33x%
sfe,all,2,pres,1,%_loadvari33y%
sfe,all,3,pres,1,%_loadvari33z%
nsel,all
esel,all
nsub,1,1,1
time,1.
outres,erase
outres,all,none
outres,nsol,all
outres,rsol,all
outres,strs,all
outres,epel,all
outres,eppl,all
stabilize,off                   ! Stabilization turned OFF by user
! *********** WB SOLVE COMMAND ***********
! check interactive state
*get,ANSINTER_,active,,int
*if,ANSINTER_,ne,0,then
/eof
*endif
solve
/com *************** Write FE CONNECTORS *********
CEWRITE,file,ce,,INTE
/com,****************************************************
/com,*************** FINISHED SOLVE FOR LS 1 *************
*get,_PCGITER,active,,solu,cgiter
/post1
fini
